// SBML level 2 version 1
// Model Starts Here

model SODoverExpression()
  // This model aims to reproduce the negative effects of overexpressing SOD seen in
  // Zintel et al. 2010 (PMID 20080171).
  // It is created as part of the GerontoMitoSys project and based on the Bachelor work of Sebastian Ullrich.
  // Modifications after the Bachelor by Axel Kowald (Axel.Kowald@hu-berlin.de):
  // 05.06.2011 Added non-enzymatic dismutation reaction for superoxide.
  // 13.04.2011 Moved paraquat inside compartment and made reaction unidirectional.
  // Currently PRX degradation is first order,
  // while PRXox degradation is second order reaction!
  // Maybe both have to be 2nd order.
  // Vmax in M/s from Forquet 85 (PMID 18498222) H2O2detox
  // Vmax in M/s for MnSOD from Crosti 85 (PMID 2931296)O2detox
  // Degradation of oxidized proteins is second order, while degradation
  // of intact proteins is of first order. If CLPP concentration is 10^-5M, a value
  // of k10=10 results in equal degradation rates. Since we assume that oxidized
  // proteins are degraded faster than intact proteins, we chose a value of k10
  // Got rate of oxigen radical production from Joenje et al. 1985 (PMID: 2984461)O2normal
  // Currently CLPP degradation is first order,
  // while CLPPox degradation is second order reaction!
  // Maybe both have to be 2nd order. CLPPdegrad
  // H2O2 can diffuse from an external pool into
  // and out of the cell with the same diffusion
  // constant. Therefore we marked the reaction
  // as reversible. But thats only for the optic.
  // The kinetic law has to describe the flux in
  // relation to reactants and products as shown
  // in the Reactions list.influxH2O2
  // Non enzymatic dismutation reaction.
  // Rate constant from Free Radicals in Biology
  // and Medicine 2nd Edn p74O2dismutation

  // Compartments:
  compartment compartment = 1;
  compartment MITOCHONDRION = 1;

  // Species:
  species O2rad in MITOCHONDRION = 0;
  species H2O2 in MITOCHONDRION = 0;
  species PRX in MITOCHONDRION = 1e-5;
  species PRXox in MITOCHONDRION = 0;
  species CLPP in MITOCHONDRION = 1e-5;
  species CLPPox in MITOCHONDRION = 0;
  species $exH2O2 in compartment = 0;
  species $degraded in compartment = 0;
  species $O2 in compartment = 0.1;
  species $praePRX in compartment = 0.1;
  species $praeCLPP in compartment = 0.1;
  species $paraquat in compartment = 0;

  // Parameters:
  n = 3;
  k5 = 0;
  k8 = 0.0001;
  k10 = 30;
  k7 = 1e-9;
  C = 1e-5;
  O2normal_k1 = 6.6e-7;
  O2detox_SOD = 1e-5;
  O2detox_k2 = 11000000;
  H2O2detox_k3 = 240000;
  O2paraquat_k4 = 1;
  altPathway_k6 = 200;
  PRXoxidation_k9 = 0;
  O2dismutation_k11 = 400000;
  CLPPoxidation_k13 = 0;

  // Reactions:
  O2normal: $O2 => O2rad; O2normal_k1*1;
  O2detox: O2rad => H2O2; O2detox_k2*O2detox_SOD*O2rad;
  H2O2detox: H2O2 => $degraded; H2O2detox_k3*PRX*H2O2;  // modifiers: PRX
  O2paraquat: $paraquat => O2rad; O2paraquat_k4*paraquat;
  influxH2O2: $exH2O2 => H2O2; k5*exH2O2;
  effluxH2O2: H2O2 => $exH2O2; k5*H2O2;
  altPathway: O2rad => $degraded; altPathway_k6*O2rad;
  CLPPproduction: $praeCLPP => CLPP; k7*(C^n/((CLPP + CLPPox)^n + C^n));  // modifiers: CLPPox
  CLPPdegrad: CLPP => $degraded; k8*CLPP;
  PRXproduction: $praePRX => PRX; k7*(C^n/((PRX + PRXox)^n + C^n));  // modifiers: PRXox
  PRXdegrad: PRX => $degraded; k8*PRX;
  PRXoxidation: PRX => PRXox; PRXoxidation_k9*H2O2*PRX;  // modifiers: H2O2
  PRXoxdetox: PRXox => $degraded; k10*PRXox*CLPP;  // modifiers: CLPP
  CLPPoxdegrad: CLPPox => $degraded; k10*CLPPox*CLPP;  // modifiers: CLPP
  O2dismutation: O2rad => H2O2; O2dismutation_k11*O2rad*O2rad;
  CLPPoxidation: CLPP => CLPPox; CLPPoxidation_k13*CLPP*H2O2;  // modifiers: H2O2
end
