// SBML level 2 version 1

model sod()
  // This is the SOD model of Kowald et al, JTB 238 (2006) 828-840.
  // Below, L is lipid radical, SO is superoxide, OH=hydroxyl radical,
  // LOO is a radical, and LOOH is stable oxidized lipid.
  // SOD is the total SOD, SODII=metal oxidized, SODII=reduced.
  // HSO is protonated SO, a fast reaction; HSO neutral so it crosses membranes.
  // Catalase. T and SODT are externally manipulated boundary conditions (bc).
  // HSO and SODI are rule/algebraically determined. They are cloaked here as bc.
  // Units are all in molar (M) and in seconds.

  // Compartments:
  compartment cell = 1;

  // Species:
  species SO in cell = 0;
  species SODII in cell = 5e-6;
  species H2O2 in cell = 0;
  species OH in cell = 0;
  species L in cell = 0;
  species LOO in cell = 0;
  species LOOH in cell = 0;
  species $HSO in cell;
  species $SODI in cell;
  species $SOD in cell = 1e-5;
  species $catalase in cell = 1e-5;

  // Parameters:
  Keq = 100;

  // Assignment rules:
  HSO := SO/Keq;
  SODI := SOD - SODII;

  // Reactions:
  etcV1: => SO; k1*1;
    k1 = 6.6e-7;
  sooV2: SO + SODII => ; k2*SO*SODII;
    k2 = 1.6e9;
  sorV3: SO => H2O2 + SODII; k3*SO*SODI;  // modifiers: SODI
    k3 = 1.6e9;
  loorV4: SO + LOO => LOOH; k4*SO*LOO;
    k4 = 100000;
  habWeiV5: SO + H2O2 => OH; k5*SO*H2O2;
    k5 = 20000;
  sodFenV6: H2O2 => OH + OH; k6*H2O2*SODII;  // modifiers: SODII
    k6 = 1;
  catGpxV7: H2O2 => ; k7*H2O2*catalase;  // modifiers: catalase
    k7 = 3.4e7;
  ohSinkV9: OH => ; k9*OH;
    k9 = 1e6;
  hsoLipPeroxV10: => L + H2O2; k10*HSO;  // modifiers: HSO
    k10 = 1000;
  hoLipPeroxV11: OH => L; k11*OH;
    k11 = 2.5e8;
  loohDeOxV12: LOOH => ; k12*LOOH;
    k12 = 0.38;
  sodoV13a: => SODII; k13a*SODI;  // modifiers: SODI
    k13a = 0.0087;
  sodrV13b: SODII => ; k13b*SODII;
    k13b = 0.0087;
  lipRadOxV17: L => LOO; k17*L;
    k17 = 30000;
  chainRxV18: LOO => L + LOOH; k18*LOO;
    k18 = 7;
  looSelfV19: LOO + LOO => ; k19*LOO^2;
    k19 = 88000;
end
