// SBML level 2 version 1
// Model Starts Here

model sod()
  // This is the SOD model of Kowald et al, JTB 238 (2006) 828-840.
  // Below, L is lipid radical, SO is superoxide, OH=hydroxyl radical,
  // LOO is a radical, and LOOH is stable oxidized lipid.
  // SOD is the total SOD, SODII=metal oxidized, SODII=reduced.
  // HSO is protonated SO, a fast reaction; HSO neutral so it crosses membranes.
  // Catalase. T and SODT are externally manipulated boundary conditions (bc).
  // HSO and SODI are rule/algebraically determined. They are cloaked here as bc.
  // Units are all in molar (M) and in seconds.

  // Compartments:
  compartment compartment = 1;
  compartment cell = 1;

  // Species:
  species SO in cell = 0;
  species SODII in cell = 5e-6;
  species H2O2 in cell = 0;
  species OH in cell = 0;
  species L in cell = 0;
  species LOO in cell = 0;
  species LOOH in cell = 0;
  species SODI in cell = 5e-6;
  species $ETC in cell = 1;
  species $gone in cell = 1;

  // Parameters:
  etcV1_k1 = 6.6e-7;
  sooV2_k2 = 1600000000;
  sorV3_k3 = 1600000000;
  loorV4_k4 = 100000;
  habWeiV5_k5 = 20000;
  sodFenV6_k6 = 1;
  catGpxV7_k7 = 34000000;
  catGpxV7_catalase = 1e-5;
  ohSinkV9_k9 = 1000000;
  hsoLipPeroxV10_k10 = 1000;
  hoLipPeroxV11_k11 = 250000000;
  loohDeOxV12_k12 = 0.38;
  sodoV13a_k13a = 0.0087;
  sodrV13b_k13b = 0.0087;
  lipRadOxV17_k17 = 30000;
  chainRxV18_k18 = 7;
  looSelfV19_k19 = 88000;

  // Reactions:
  etcV1: $ETC => SO; etcV1_k1*1;
  sooV2: SO + SODII => SODI; sooV2_k2*SO*SODII;
  sorV3: SO + SODI => H2O2 + SODII; sorV3_k3*SO*SODI;
  loorV4: SO + LOO => LOOH; loorV4_k4*SO*LOO;
  habWeiV5: SO + H2O2 => OH; habWeiV5_k5*SO*H2O2;
  sodFenV6: H2O2 => OH; sodFenV6_k6*H2O2*SODI;  // modifiers: SODI
  catGpxV7: H2O2 => $gone; catGpxV7_k7*H2O2*catGpxV7_catalase;
  ohSinkV9: OH => $gone; ohSinkV9_k9*OH;
  hsoLipPeroxV10: SO => L + H2O2; hsoLipPeroxV10_k10*SO/100;
  hoLipPeroxV11: OH => L; hoLipPeroxV11_k11*OH;
  loohDeOxV12: LOOH => $gone; loohDeOxV12_k12*LOOH;
  sodoV13a: SODI => SODII; sodoV13a_k13a*SODI;
  sodrV13b: SODII => SODI; sodrV13b_k13b*SODII;
  lipRadOxV17: L => LOO; lipRadOxV17_k17*L;
  chainRxV18: LOO => L + LOOH; chainRxV18_k18*LOO;
  looSelfV19: LOO + LOO => $gone; looSelfV19_k19*LOO^2;
end
